<?xml version="1.0"?>
<Node name="root" dt="0.02">
    <VisualStyle displayFlags="showBehaviorModels showForceFields" />
    <CollisionPipeline verbose="0" draw="0" />
    <BruteForceDetection name="N2" />
    <MinProximityIntersection name="Proximity" alarmDistance="0.8" contactDistance="0.5" />
    <CollisionResponse name="Response" response="default" />
    <Node name="cubeFEM">
        <EulerImplicit name="cg_odesolver" printLog="false" />
        <CGLinearSolver iterations="25" name="linear solver" tolerance="1.0e-9" threshold="1.0e-9" />
        <MechanicalObject />
        <UniformMass mass="0.25" />
        <RegularGrid nx="5" ny="5" nz="5" xmin="-3.5" xmax="3.5" ymin="-3.5" ymax="3.5" zmin="-3.5" zmax="3.5" />
        <TetrahedronFEMForceField name="FEM" youngModulus="25" poissonRatio="0.3" computeGlobalMatrix="false" updateStiffnessMatrix="false" method="large" />
        <Node name="Visu">
            <OglModel name="Visual" fileMesh="misc/cube.obj" />
            <!-- <SubsetMapping input="@.." output="@Visual" /> -->
            <BarycentricMapping template="Vec3d,ExtVec3f" input="@.." output="@Visual" />
        </Node>
        <Node name="Surf">
            <MeshObjLoader name="loader" filename="misc/cube.obj" />
            <Mesh src="@loader" />
            <MechanicalObject src="@loader" />
            <Triangle />
            <Line />
            <Point />
            <BarycentricMapping />
        </Node>
    </Node>
    <Node name="Floor">
        <MeshObjLoader name="loader" filename="mesh/floor3.obj" />
        <Mesh src="@loader" />
        <MechanicalObject src="@loader" dy="-10" scale="1.75" />
        <Triangle name="FloorTriangle" simulated="0" moving="0" />
        <Line name="FloorLine" simulated="0" moving="0" />
        <Point name="FloorLine" simulated="0" moving="0" />
        <OglModel name="FloorV" fileMesh="mesh/floor3.obj" texturename="textures/brushed_metal.bmp" dy="-10" scale="1.75" />
    </Node>
</Node>
