<?xml version="1.0" ?>
<Node name="root" gravity="0 -9.81 0" dt="0.02">
	<!-- <VisualStyle displayFlags="showBehaviorModels showForceFields  showVisualModels showCollisionModels hideVisual" /> -->
	<RequiredPlugin pluginName="SofaPython"/>

	<VisualStyle displayFlags="showBehavior showMapping " />
	<CollisionPipeline name="pipeline" depth="6" verbose="0" />
	<BruteForceDetection name="Detection" />

	<CollisionResponse name="response" response="FrictionContact" />

	<LocalMinDistance name="proximity" alarmDistance="0.3" contactDistance="0.15" angleCone="0.0" />

	<FreeMotionAnimationLoop />
	<LCPConstraintSolver tolerance="0.001" maxIt="1000"/>


	<Node name="Tissue" activated="true">
		<EulerImplicitSolver name="Implicit Euler Solver" />
		<CGLinearSolver template="GraphScattered" name="Conjugate Gradient" iterations="25" tolerance="1e-5" threshold="1e-5"/>
		<RegularGridTopology name="grid" n="16 8 16" min="-10 -5 -10" max="10 5 10" />

		<TetrahedronSetTopologyContainer name="default_container" />
		<TetrahedronSetGeometryAlgorithms />


		<MechanicalObject template="Vec3d" name="Hexa" />
		<UniformMass template="Vec3d" name="Mass" mass="0.25"/>

		<TetrahedronFEMForceField name="FEM" youngModulus="80" poissonRatio="0.45" method="large" />

		<Node name="Triangles Mesh" >
			<TriangleSetTopologyContainer name="Container" />
			<TriangleSetTopologyModifier name="Modifier" />
			<TriangleSetTopologyAlgorithms template="Vec3d" name="TopoAlgo" />
			<TriangleSetGeometryAlgorithms template="Vec3d" name="GeomAlgo" />
			<Tetra2TriangleTopologicalMapping name="default8" input="@../grid" output="@Container" />
			<Node name="Visu">
				<OglModel template="ExtVec3f" name="Visual" material="Default Diffuse 1 1 0 0 1 Ambient 1 0.2 0 0 1 Specular 0 1 0 0 1 Emissive 0 1 0 0 1 Shininess 0 45" />
				<IdentityMapping template="Vec3d,ExtVec3f" name="default12" input="@../" output="@Visual" />
			</Node>
		</Node>


		<Node name="CollisionNode" >
			<RegularGridTopology name="collision_node_top" n="16 8 16" min="-10 -5 -10" max="10 5 10" />
			<MechanicalObject name="collision_node_MO" />
			<PointModel name="collision_points" contactStiffness="100"  contactFriction="0.51"/>
			<LineModel name="collision_lines" contactStiffness="100"  contactFriction="0.51"/>
			<TTriangleModel template="Vec3d" name="collision_triangles" contactStiffness="100"  contactFriction="0.51"/>
			<BarycentricMapping  name="collision_node_BM" input="@../" output="@."  />
		</Node>

<!-- 		<Node name="CollisionNode" >
			<TriangleSetTopologyContainer name="collision_node_triCont" />
			<TriangleSetTopologyModifier />
			<TriangleSetTopologyAlgorithms />
			<TriangleSetGeometryAlgorithms />
			<Tetra2TriangleTopologicalMapping name="collision_node_mapping" input="@../default_container" output="@collision_node_triCont" flipNormals="true" />
			<MechanicalObject name="collision_node_MO" />
			<PointModel name="collision_points" contactStiffness="5"  contactFriction="0.51"/>
			<LineModel name="collision_lines" contactStiffness="5"  contactFriction="0.51"/>
			<TTriangleModel name="collision_triangles" contactStiffness="5"  contactFriction="0.51"/>
			<BarycentricMapping name="collision_node_BM" input="@../Hexa" output="@collision_node_MO"  />
		</Node> -->

	</Node>


	<!-- Floor -->
	<Node name="Plane">
		<MeshTopology name="Mesh"  fileTopology="misc/cube.obj" />
		<MechanicalObject template="Vec3d" name="Floor"  position="0 0 0"  velocity="0 0 0"  force="0 0 0"  externalForce="0 0 0"  derivX="0 0 0"  restScale="1"  translation="0 -5.10001 0"  rotation="0 0 0"  scale3d="130 0.2 130"  />
		<TTriangleModel template="Vec3d" name="Triangles"  moving="0"  simulated="0"  contactStiffness="500"  contactFriction="0.91" />
		<TLineModel template="Vec3d" name="Lines"  moving="0"  simulated="0"  contactStiffness="500"  contactFriction="0.91" />
		<TPointModel template="Vec3d" name="Points"  moving="0"  simulated="0"  contactStiffness="500"  contactFriction="0.91" />
		<OglModel template="ExtVec3f" name="Visual"  fileMesh="misc/cube.obj"  translation="0 -5.10001 0"  rotation="0 0 0"  scale3d="130 0.2 130"  material="Default Diffuse 1 0.5 0.5 0.5 1 Ambient 1 0.1 0.1 0.1 1 Specular 0 0.5 0.5 0.5 1 Emissive 0 0.5 0.5 0.5 1 Shininess 0 45 "  primitiveType="DEFAULT"  blendEquation="GL_FUNC_ADD"  sfactor="GL_SRC_ALPHA"  dfactor="GL_ONE_MINUS_SRC_ALPHA" />
	</Node>


	<Node name="Tongue" activated="false">
		<EulerImplicit name="odesolver" vdamping="4.0"/>
		<CGLinearSolver iterations="10" name="linear solver" tolerance="1.0e-9" threshold="1.0e-9" />
		<MeshVTKLoader name="volTongue" filename="misc/volumetricTongue.vtu" />
		<TetrahedronSetTopologyContainer name="volume" src="@volTongue" />
		<TetrahedronSetGeometryAlgorithms />
		<MechanicalObject name="mecaTongue" />
		<DiagonalMass massDensity="1" name="computed using mass density" />
		<TetrahedralCorotationalFEMForceField name="FEM" youngModulus="1000" poissonRatio="0.45" method="large" />

		<!-- <PrecomputedConstraintCorrection recompute="true"/> -->

		<BoxROI name="ROI" box="-1 1 -1 1 2 1" drawBoxes="1"/>
		<FixedConstraint template="Vec3d" indices="@ROI.indices"/>
		<Node name="TongueVisualModel">
			<OglModel name="TongueVisualModel" fileMesh="misc/tongue.obj" color="red" />
			<BarycentricMapping name="tongueMapping" input="@../mecaTongue" output="@TongueVisualModel" />
		</Node>
		<Node name="TongueCollisionModel">
			<TriangleSetTopologyContainer name="TriContainer" />
			<TriangleSetTopologyModifier name="Modifier" />
			<TriangleSetTopologyAlgorithms name="TopoAlgo" />
			<TriangleSetGeometryAlgorithms name="GeomAlgo" />
			<Tetra2TriangleTopologicalMapping name="mapping" input="@../volume" output="@TriContainer" flipNormals="true" />
			<MechanicalObject name="colTongue" />
			<Triangle name="tongue" contactStiffness="5" />
			<Line name="tongue" contactStiffness="5" />
			<Point name="tongue" contactStiffness="5" />
			<IdentityMapping name="identityMappingToCollision" input="@../mecaTongue" output="@colTongue" isMechanical="false" />
		</Node>
	</Node>


	<!-- Needle -->
	<Node name="InstrControl">
        <MechanicalObject template="Rigid" name="DOFs" position="0 0 -30  0 0 0 1" />
        <PythonScriptController filename="keyboardControl.py" classname="KeyboardControl"/>

        <Node name="RefModel">
            <MeshObjLoader filename="misc/needle_model/needleLine.obj"  name="loader" />
            <Mesh src="@loader" />
            <MechanicalObject src="@loader" name="instrumentCollisionState" rz="0" dx="0"/>
            <RigidMapping input="@../DOFs" output="@instrumentCollisionState"/>
        </Node>
    </Node>


	<Node name="Instrument">
		<EulerImplicitSolver name="ODE solver" rayleighStiffness="0.01" rayleighMass="1.0" />
		<CGLinearSolver name="linear solver" iterations="25" tolerance="1e-10" threshold="10e-10" />
		<MechanicalObject name="instrumentState" template="Rigid" position="0 0 -30 0 0 0 1" />
		<UniformMass name="mass" totalmass="0.05" showGravityCenter="true" />

		<UncoupledConstraintCorrection />
		<Node name="VisualModel">
			<OglModel name="InstrumentVisualModel" fileMesh="misc/needle_model/needleVisual.obj" color="0.8 0.8 0.8 1.0" scale3d="10 10 10" />
			<RigidMapping name="MM-VM mapping" input="@../instrumentState" output="@InstrumentVisualModel" />
		</Node>
		<Node name="CollisionModel">
			<MeshObjLoader filename="misc/needle_model/needleLine.obj" name="loader" />
			<Mesh src="@loader" name="InstrumentCollisionModel" />
			<MechanicalObject src="@loader" name="instrumentCollisionState" scale3d="10 10 10" />
			<Line name="instrument" contactStiffness="10"  contactFriction="0.51" />
			<Point name="instrument" contactStiffness="10"  contactFriction="0.51" />
			<RigidMapping name="MM-CM mapping" input="@../instrumentState" output="@instrumentCollisionState" />
		</Node>

		<VectorSpringForceField object1="@InstrControl/RefModel/instrumentCollisionState" object2="@Instrument/CollisionModel/instrumentCollisionState" stiffness="1000" viscosity="0" />

	</Node>
</Node>


<!-- Allora: spostare i fregni -> meccanical obj iniziali (di strumento e controllore); scalare i fregni -> mechanical obj dei vari children -->
